# OpenSim document version 40500
ScaleTool ThoracoscapularShoulderModel-scaled:
  mass: 24.67874 [kg]
  height: -1
  age: -1
  ModelScaler:
    apply: true
    scaling_order: measurements
    marker_file: Neeraj_FullAction_pp_22_06_24_t02_displaced.trc
    time_range: 0 63.15
    preserve_mass_distribution: true
    MeasurementSet:
      Measurement thorax: apply=true
        MarkerPair: markers=(CLAV STRN)
        MarkerPair: markers=(C7 T10)
        MarkerPair: markers=(STRN DIA)
        MarkerPair: markers=(CLAV DIA)
        BodyScale thorax: axes=(X Y Z)
      Measurement humerus: apply=true
        MarkerPair: markers=(RSHO RELB)
        MarkerPair: markers=(RSHO MRELB)
        BodyScale humerus: axes=(X Y Z)
      Measurement radius: apply=true
        MarkerPair: markers=(RELB RWRA)
        MarkerPair: markers=(MRELB RWRA)
        BodyScale radius: axes=(X Y Z)
      Measurement ulna: apply=true
        MarkerPair: markers=(RELB RWRB)
        MarkerPair: markers=(MRELB RWRB)
        BodyScale ulna: axes=(X Y Z)
      Measurement clavicle: apply=true
        MarkerPair: markers=(RSHO CLAV)
        BodyScale clavicle: axes=(X Y Z)
      Measurement scapula: apply=true
        MarkerPair: markers=(RBAK RSHO)
        BodyScale scapula: axes=(X Y Z)
  MarkerPlacer:
    apply: true
    marker_file: Neeraj_FullAction_pp_22_06_24_t02_displaced.trc
    time_range: 0 5
    max_marker_movement: -1
    IKTaskSet:
      IKMarkerTask CLAV: apply=true weight=10
      IKMarkerTask C7: apply=true weight=10
      IKMarkerTask T10: apply=true weight=10
      IKMarkerTask STRN: apply=true weight=10
      IKMarkerTask PRSHO: apply=true weight=20
      IKMarkerTask RSHO: apply=true weight=20
      IKMarkerTask RBAK: apply=true weight=10
      IKMarkerTask RUPA: apply=true weight=10
      IKMarkerTask RELB: apply=true weight=20
      IKMarkerTask MRELB: apply=true weight=20
      IKMarkerTask RWRA: apply=true weight=20
      IKMarkerTask RWRB: apply=true weight=20
      IKMarkerTask RFRM: apply=true weight=10
      IKMarkerTask DIA: apply=true weight=10
      IKMarkerTask ARSHO: apply=true weight=20
