# OpenSim document version 40500
ScaleTool arm26-scaled:
  mass: 3.398887 [kg]
  height: -1
  age: -1
  ModelScaler:
    apply: true
    scaling_order: measurements
    marker_file: Neeraj_PP_27_6_24_elbow_flexion_displaced_t01.trc
    time_range: 0 54.358
    preserve_mass_distribution: true
    MeasurementSet:
      Measurement r_humerus: apply=true
        MarkerPair: markers=(r_acromion r_humerus_epicondyle)
        BodyScale r_humerus: axes=(X Y Z)
      Measurement r_ulna_radius_hand: apply=true
        MarkerPair: markers=(r_humerus_epicondyle r_radius_styloid)
        BodyScale r_ulna_radius_hand: axes=(X Y Z)
  MarkerPlacer:
    apply: true
    marker_file: Neeraj_PP_27_6_24_elbow_flexion_displaced_t01.trc
    time_range: 0 4
    max_marker_movement: -1
    IKTaskSet:
      IKMarkerTask r_acromion: apply=true weight=20
      IKMarkerTask r_humerus_epicondyle: apply=true weight=20
      IKMarkerTask r_radius_styloid: apply=true weight=20
