# OpenSim document version 40500
InverseKinematicsTool:
  time_range: 0 54.358
  marker_file: Neeraj_PP_27_6_24_elbow_flexion_displaced_t01.trc
  IKTaskSet:
    IKMarkerTask r_acromion: apply=true weight=20
    IKMarkerTask r_humerus_epicondyle: apply=true weight=20
    IKMarkerTask r_radius_styloid: apply=true weight=20
