# OpenSim document version 40500
ScaleTool arm26-scaled:
  mass: 3.398887 [kg]
  height: -1
  age: -1
  ModelScaler:
    apply: true
    scaling_order: measurements
    marker_file: Shreyas_ElbFlex_pp_staticPose.trc
    time_range: 0 6.475
    preserve_mass_distribution: false
    MeasurementSet:
      Measurement base : apply=true
        MarkerPair: markers=(RSHO STRN)
        MarkerPair: markers=(CLAV STRN)
        MarkerPair: markers=(STRN T10)
        MarkerPair: markers=(T10 C7)
        BodyScale base: axes=(X Y Z)
      Measurement humerus: apply=true
        MarkerPair: markers=(RELB RSHO)
        MarkerPair: markers=(MRELB RSHO)
        BodyScale r_humerus: axes=(X Y Z)
      Measurement ulna_rad_hand: apply=true
        MarkerPair: markers=(RELB RHAND)
        MarkerPair: markers=(MRELB MRHAND)
        BodyScale r_ulna_radius_hand: axes=(X Y Z)
  MarkerPlacer:
    apply: true
    marker_file: Shreyas_ElbFlex_pp_staticPose.trc
    time_range: 0 6.475
    max_marker_movement: -1
    IKTaskSet:
      IKMarkerTask RSHO: apply=true weight=20
      IKMarkerTask RELB: apply=true weight=20
      IKMarkerTask RWRA: apply=true weight=20
      IKMarkerTask RWRB: apply=true weight=20
      IKMarkerTask RFRM: apply=true weight=10
      IKMarkerTask MRELB: apply=true weight=20
      IKMarkerTask RUPA: apply=true weight=10
      IKMarkerTask ARSHO: apply=true weight=10
      IKMarkerTask PRSHO: apply=true weight=10
      IKMarkerTask CLAV: apply=true weight=10
      IKMarkerTask STRN: apply=true weight=10
      IKMarkerTask C7: apply=true weight=10
      IKMarkerTask T10: apply=true weight=10
      IKMarkerTask MRHAND: apply=true weight=20
      IKMarkerTask RHAND: apply=true weight=20
      IKMarkerTask RBHD: apply=true weight=10
      IKMarkerTask LBHD: apply=true weight=10
      IKMarkerTask RFHD: apply=true weight=10
      IKMarkerTask LFHD: apply=true weight=10
