# OpenSim document version 40500
InverseKinematicsTool:
  time_range: 0 89.225
  marker_file: ../../Downloads/08_06_2024_Shreyas_PP_t02.trc
  IKTaskSet:
    IKMarkerTask LFHD: apply=true weight=1
    IKMarkerTask RFHD: apply=true weight=1
    IKMarkerTask RBHD: apply=true weight=1
    IKMarkerTask LBHD: apply=true weight=1
    IKMarkerTask C7: apply=true weight=1
    IKMarkerTask LSHO: apply=true weight=20
    IKMarkerTask RSHO: apply=true weight=20
    IKMarkerTask CLAV: apply=true weight=1
    IKMarkerTask STRN: apply=true weight=1
    IKMarkerTask RBAK: apply=true weight=1
    IKMarkerTask T10: apply=true weight=1
    IKMarkerTask RUPA: apply=true weight=10
    IKMarkerTask LUPA: apply=true weight=10
    IKMarkerTask RELB: apply=true weight=20
    IKMarkerTask LELB: apply=true weight=20
    IKMarkerTask RWRB: apply=true weight=20
    IKMarkerTask RWRA: apply=true weight=20
    IKMarkerTask LWRB: apply=true weight=20
    IKMarkerTask LWRA: apply=true weight=20
    IKMarkerTask RASI: apply=true weight=20
    IKMarkerTask LASI: apply=true weight=20
    IKMarkerTask RPSI: apply=true weight=20
    IKMarkerTask LPSI: apply=true weight=20
    IKMarkerTask RANK: apply=true weight=20
    IKMarkerTask LANK: apply=true weight=20
    IKMarkerTask LHEE: apply=true weight=10
    IKMarkerTask LTOE: apply=true weight=10
    IKMarkerTask RHEE: apply=true weight=10
    IKMarkerTask RTOE: apply=true weight=10
    IKMarkerTask RKNE: apply=true weight=20
    IKMarkerTask LKNE: apply=true weight=20
    IKMarkerTask LTIB: apply=true weight=10
    IKMarkerTask RTIB: apply=true weight=10
    IKMarkerTask MLKNE: apply=true weight=20
    IKMarkerTask MRKNE: apply=true weight=20
    IKMarkerTask LRFIN: apply=true weight=20
    IKMarkerTask LLFIN: apply=true weight=20
    IKMarkerTask MLFIN: apply=true weight=20
    IKMarkerTask MRFIN: apply=true weight=20
    IKMarkerTask MLELB: apply=true weight=20
    IKMarkerTask MRELB: apply=true weight=20
    IKMarkerTask PLSHO: apply=true weight=1
    IKMarkerTask PRSHO: apply=true weight=1
    IKMarkerTask ALSHO: apply=true weight=1
    IKMarkerTask ARSHO: apply=true weight=1
    IKMarkerTask RTHG: apply=true weight=10
    IKMarkerTask LTHG: apply=true weight=10
    IKMarkerTask RHIP: apply=true weight=20
    IKMarkerTask LHIP: apply=true weight=20
    IKMarkerTask MLTOE: apply=true weight=20
    IKMarkerTask MRTOE: apply=true weight=20
    IKMarkerTask LRTOE: apply=true weight=20
    IKMarkerTask LLTOE: apply=true weight=20
    IKMarkerTask MLANK: apply=true weight=20
    IKMarkerTask MRANK: apply=true weight=20
    IKMarkerTask RFRM: apply=true weight=10
    IKMarkerTask LFRM: apply=true weight=10
