# OpenSim document version 40500
MarkerSet:
  Marker LFHD: torso (0.07791926 0.6218112 -0.04335129)
  Marker RFHD: torso (0.0779193 0.621811 0.0433513)
  Marker RBHD: torso (-0.06 0.587554 0.06)
  Marker LBHD: torso (-0.06 0.5875538 -0.06)
  Marker C7: torso (-0.076 0.42 0)
  Marker LSHO: torso (0.0104336 0.429191 -0.139243)
  Marker RSHO: torso (0.0104336 0.429191 0.139243)
  Marker CLAV: torso (0.04 0.38 0)
  Marker STRN: torso (0.14821 0.155452 0)
  Marker RBAK: torso (-0.107606 0.304523 0.0639499)
  Marker T10: torso (-0.0701565 0.122 0)
  Marker RUPA: humerus_r (0.004373937 -0.137081 0.02449127)
  Marker LUPA: humerus_l (0.00437394 -0.137081 -0.0244913)
  Marker RELB: humerus_r (0.01452048 -0.2791219 0.03926685)
  Marker LELB: humerus_l (0.0145205 -0.279122 -0.0392669)
  Marker RWRB: radius_r (-0.01531 -0.23272 -0.01839)
  Marker RWRA: radius_r (-0.00316 -0.22312 0.04988)
  Marker LWRB: radius_l (-0.01531 -0.23272 0.01839)
  Marker LWRA: radius_l (-0.00316 -0.22312 -0.04988)
  Marker RASI: pelvis (0.0114978 0.0197974 0.128)
  Marker LASI: pelvis (0.0114978 0.0197974 -0.128)
  Marker RPSI: pelvis (-0.156069 0.0394098 0.0553998)
  Marker LPSI: pelvis (-0.156069 0.039541 -0.0553998)
  Marker RANK: tibia_r (-0.005 -0.41 0.053)
  Marker LANK: tibia_l (-0.005 -0.41 -0.053)
  Marker LHEE: calcn_l (-0.0226731 0.0281286 0.00680222)
  Marker LTOE: calcn_l (0.186453 0.031901 -0.00286075)
  Marker RHEE: calcn_r (-0.0226731 0.0281286 -0.00680222)
  Marker RTOE: calcn_r (0.186453 0.031901 0.00286075)
  Marker RKNE: femur_r (0.0157499 -0.404039 0.0498872)
  Marker LKNE: femur_l (0.0157499 -0.404039 -0.0498872)
  Marker LTIB: femur_l (0.03384848 -0.618782 -0.005244191)
  Marker RTIB: femur_l (0.0338485 -0.618782 0.1685558)
  Marker MLKNE: femur_l (0.0275439 -0.395315 0.05584616)
  Marker MRKNE: femur_l (0.0275439 -0.395315 0.1127516)
  Marker LRFIN: femur_l (-0.01190544 -0.1008356 0.3249093)
  Marker LLFIN: femur_l (-0.0119054 -0.100836 -0.160906)
  Marker MLFIN: femur_l (-0.009750947 -0.1005425 -0.06232989)
  Marker MRFIN: femur_l (-0.01242848 -0.100542 0.2293419)
  Marker MLELB: femur_l (-0.01443516 0.2542052 -0.04475043)
  Marker MRELB: tibia_r (-0.0144352 0.6451446 0.0447504)
  Marker PLSHO: tibia_r (0.0186602 -0.21186 0.0445987)
  Marker PRSHO: tibia_r (0.0148782 -0.305718 0.0382921)
  Marker ALSHO: tibia_r (0.0509128 -0.0899375 -0.00770593)
  Marker ARSHO: tibia_r (0.0405929 -0.168595 -0.00619357)
  Marker RTHG: ground (-0.0256323 -0.28115 0.107201)
  Marker LTHG: ground (-0.0256323 -0.28115 -0.107201)
  Marker RHIP: ground (-0.07407257 -0.08660445 0.1577721)
  Marker LHIP: ground (-0.0740726 -0.0866044 -0.157772)
  Marker MLTOE: ground (0.0411047 -0.952952 -0.0437871)
  Marker MRTOE: ground (0.04110471 -0.9529521 0.04378707)
  Marker LRTOE: ground (0.021973 -0.940087 0.149241)
  Marker LLTOE: ground (0.02197295 -0.9400867 -0.149241)
  Marker MLANK: ground (-0.0776684 -0.876404 -0.0514007)
  Marker MRANK: ground (-0.07766842 -0.876404 0.05140065)
  Marker RFRM: ground (-0.06692795 0.4869273 0.6033109)
  Marker LFRM: ground (-0.066928 0.486927 -0.603311)
