# OpenSim document version 40500
ScaleTool RaabeFullBody-scaled:
  mass: 72.2 [kg]
  height: -1
  age: -1
  ModelScaler:
    apply: true
    scaling_order: measurements
    marker_file: C:/Users/charu/Desktop/Intern_biomech/../../Downloads/08_06_2024_Shreyas_PP_t02.trc
    time_range: 0 89.225
    preserve_mass_distribution: true
    MeasurementSet:
      Measurement pelvis: apply=true
        MarkerPair: markers=(RASI RPSI)
        MarkerPair: markers=(LASI LPSI)
        MarkerPair: markers=(LASI RASI)
        BodyScale pelvis: axes=(X Y Z)
        BodyScale sacrum: axes=(X Y Z)
      Measurement shank: apply=true
        MarkerPair: markers=(RKNE RANK)
        MarkerPair: markers=(MRKNE MRANK)
        MarkerPair: markers=(LKNE LANK)
        MarkerPair: markers=(MLKNE MLANK)
        BodyScale tibia_r: axes=(X Y Z)
        BodyScale talus_r: axes=(X Y Z)
        BodyScale tibia_l: axes=(X Y Z)
        BodyScale talus_l: axes=(X Y Z)
      Measurement humerus: apply=true
        MarkerPair: markers=(RSHO RELB)
        MarkerPair: markers=(LSHO LELB)
        MarkerPair: markers=(LSHO MLELB)
        MarkerPair: markers=(RSHO MRELB)
        BodyScale humerus_r: axes=(X Y Z)
        BodyScale humerus_l: axes=(X Y Z)
      Measurement radius_ulna: apply=true
        MarkerPair: markers=(LELB LWRA)
        MarkerPair: markers=(MLELB LWRB)
        MarkerPair: markers=(RELB RWRA)
        MarkerPair: markers=(MRELB RWRB)
        BodyScale ulna_r: axes=(X Y Z)
        BodyScale radius_r: axes=(X Y Z)
        BodyScale ulna_l: axes=(X Y Z)
        BodyScale radius_l: axes=(X Y Z)
      Measurement torso: apply=true
        MarkerPair: markers=(LPSI LBHD)
        MarkerPair: markers=(RPSI RBHD)
        MarkerPair: markers=(RASI RFHD)
        MarkerPair: markers=(LASI RFHD)
        BodyScale lumbar5: axes=(X Y Z)
        BodyScale lumbar4: axes=(X Y Z)
        BodyScale lumbar3: axes=(X Y Z)
        BodyScale lumbar2: axes=(X Y Z)
        BodyScale lumbar1: axes=(X Y Z)
        BodyScale torso: axes=(X Y Z)
        BodyScale Abdomen: axes=(X Y Z)
        BodyScale LB_wrap: axes=(X Y Z)
      Measurement foot: apply=true
        MarkerPair: markers=(LHEE LTOE)
        MarkerPair: markers=(RHEE RTOE)
        MarkerPair: markers=(LLTOE MLTOE)
        MarkerPair: markers=(MRTOE LRTOE)
        BodyScale calcn_r: axes=(X Y Z)
        BodyScale toes_r: axes=(X Y Z)
        BodyScale calcn_l: axes=(X Y Z)
        BodyScale toes_l: axes=(X Y Z)
      Measurement hand: apply=true
        MarkerPair: markers=(RWRA LRFIN)
        MarkerPair: markers=(RWRB MRFIN)
        MarkerPair: markers=(MRFIN LRFIN)
        MarkerPair: markers=(LWRA LLFIN)
        MarkerPair: markers=(LWRB MLFIN)
        MarkerPair: markers=(LLFIN MLFIN)
        BodyScale hand_r: axes=(X Y Z)
        BodyScale hand_l: axes=(X Y Z)
      Measurement thigh: apply=true
        MarkerPair: markers=(LKNE LHIP)
        MarkerPair: markers=(RKNE RHIP)
        MarkerPair: markers=(MLKNE LHIP)
        MarkerPair: markers=(MRKNE RHIP)
        BodyScale femur_r: axes=(X Y Z)
        BodyScale patella_r: axes=(X Y Z)
        BodyScale femur_l: axes=(X Y Z)
        BodyScale patella_l: axes=(X Y Z)
  MarkerPlacer:
    apply: true
    marker_file: C:/Users/charu/Desktop/Intern_biomech/../../Downloads/12_06_2024_Shreyas_StaticPose.trc
    time_range: 0 3.658
    max_marker_movement: -1
    IKTaskSet:
      IKMarkerTask LFHD: apply=true weight=1
      IKMarkerTask RFHD: apply=true weight=1
      IKMarkerTask RBHD: apply=true weight=1
      IKMarkerTask LBHD: apply=true weight=1
      IKMarkerTask C7: apply=true weight=1
      IKMarkerTask LSHO: apply=true weight=20
      IKMarkerTask RSHO: apply=true weight=20
      IKMarkerTask CLAV: apply=true weight=1
      IKMarkerTask STRN: apply=true weight=1
      IKMarkerTask RBAK: apply=true weight=1
      IKMarkerTask T10: apply=true weight=1
      IKMarkerTask RUPA: apply=true weight=10
      IKMarkerTask LUPA: apply=true weight=10
      IKMarkerTask RELB: apply=true weight=20
      IKMarkerTask LELB: apply=true weight=20
      IKMarkerTask RWRB: apply=true weight=20
      IKMarkerTask RWRA: apply=true weight=20
      IKMarkerTask LWRB: apply=true weight=20
      IKMarkerTask LWRA: apply=true weight=20
      IKMarkerTask RASI: apply=true weight=20
      IKMarkerTask LASI: apply=true weight=20
      IKMarkerTask RPSI: apply=true weight=20
      IKMarkerTask LPSI: apply=true weight=20
      IKMarkerTask RANK: apply=true weight=20
      IKMarkerTask LANK: apply=true weight=20
      IKMarkerTask LHEE: apply=true weight=10
      IKMarkerTask LTOE: apply=true weight=10
      IKMarkerTask RHEE: apply=true weight=10
      IKMarkerTask RTOE: apply=true weight=10
      IKMarkerTask RKNE: apply=true weight=20
      IKMarkerTask LKNE: apply=true weight=20
      IKMarkerTask LTIB: apply=true weight=10
      IKMarkerTask RTIB: apply=true weight=10
      IKMarkerTask MLKNE: apply=true weight=20
      IKMarkerTask MRKNE: apply=true weight=20
      IKMarkerTask LRFIN: apply=true weight=20
      IKMarkerTask LLFIN: apply=true weight=20
      IKMarkerTask MLFIN: apply=true weight=20
      IKMarkerTask MRFIN: apply=true weight=20
      IKMarkerTask MLELB: apply=true weight=20
      IKMarkerTask MRELB: apply=true weight=20
      IKMarkerTask PLSHO: apply=true weight=1
      IKMarkerTask PRSHO: apply=true weight=1
      IKMarkerTask ALSHO: apply=true weight=1
      IKMarkerTask ARSHO: apply=true weight=1
      IKMarkerTask RTHG: apply=true weight=10
      IKMarkerTask LTHG: apply=true weight=10
      IKMarkerTask RHIP: apply=true weight=20
      IKMarkerTask LHIP: apply=true weight=20
      IKMarkerTask MLTOE: apply=true weight=20
      IKMarkerTask MRTOE: apply=true weight=20
      IKMarkerTask LRTOE: apply=true weight=20
      IKMarkerTask LLTOE: apply=true weight=20
      IKMarkerTask MLANK: apply=true weight=20
      IKMarkerTask MRANK: apply=true weight=20
      IKMarkerTask RFRM: apply=true weight=10
      IKMarkerTask LFRM: apply=true weight=10
