# OpenSim document version 40500
InverseKinematicsTool:
  time_range: 0 58.808
  output_motion_file: C:\Users\charu\Desktop\Project\without weight\IK_without weight
  marker_file: ../../edited data/Neeraj_13_07_24_t02 _without_weight_displaced.trc
  IKTaskSet:
    IKMarkerTask r_acromion: apply=true weight=20
    IKMarkerTask r_humerus_epicondyle: apply=true weight=20
    IKMarkerTask r_radius_styloid: apply=true weight=20
    IKMarkerTask RHAND: apply=true weight=10
    IKMarkerTask RWRB: apply=true weight=20
